A := 150
B := 90
Tol := 5
R := 15
P := 80*10^6
E := 50*10^6
ν := 0.33
f(x, y) := 12*(1 - ν^2)*P/(E*Tol^3)
ε := 0.5
N := 150
h := A/N
M := ceil(90/h)
M1 := ceil(60/h)
M2 := ceil(75/h)
M4 := ceil(15/h)
h = 1
M = 90
M1 = 60
M2 = 75
M4 = 15
f(1, 1) = 0.136873
DIRIXLE :=
    r2 ← 10^10
    for i ∈ 0 .. N
        x[i] ← i*h
        u[i, 0] ← 0
        u[i, M] ← 0
    for j ∈ 0 .. M
        y[j] ← j*h
        u[0, j] ← 0
        u[N, j] ← 0
    for i ∈ 0 .. N
        for j ∈ 0 .. M
            u[i, j] ← 0
    for i ∈ 1 .. M1
        for j ∈ 1 .. M - 1
            u[i, j] ← 1
    for i ∈ M1 .. M
        for j ∈ 1 .. M - ceil(sqrt(225 - (i - 75)^2)) - 1
            u[i, j] ← 1
    for i ∈ M .. N - 1
        for j ∈ 1 .. M - 1
            u[i, j] ← 1
    f1 ← f(1, 1)
    for k ∈ 0 .. 10000
        r1 ← r2
        r2 ← 0
        for i ∈ 1 .. M1
            for j ∈ 1 .. M - 1
                u1 ← 0.25*(u[i, j - 1] + u[i, j + 1] + u[i - 1, j] + u[i + 1, j] - h^2*f1)
                r ← |u1 - u[i, j]|
                r2 ← r if r2 ≤ r
                u[i, j] ← u1
        for i ∈ M1 .. M
            for j ∈ 1 .. M - ceil(sqrt(225 - (i - 75)^2)) - 1
                u1 ← 0.25*(u[i, j - 1] + u[i, j + 1] + u[i - 1, j] + u[i + 1, j] - h^2*f1)
                r ← |u1 - u[i, j]|
                r2 ← r if r2 ≤ r
                u[i, j] ← u1
        for i ∈ M .. N - 1
            for j ∈ 1 .. M - 1
                u1 ← 0.25*(u[i, j - 1] + u[i, j + 1] + u[i - 1, j] + u[i + 1, j] - h^2*f1)
                r ← |u1 - u[i, j]|
                r2 ← r if r2 ≤ r
                u[i, j] ← u1
                te ← ε*(1 - r2/r1)
        break if r2 ≤ te
        continue
    [k; u]
DIRIXLE[0] = 5700
k1 := 0 .. N
k2 := 0 .. M
PGIB[k1, k2] := DIRIXLE[1][k1, k2]
PGIB = [
    0, 0, 0, 0, 0, 0, 0, 0, 0, 0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;
    0, -0.374236, -0.680022, -0.944399, -1.18008, -1.39401, -1.59047, -1.77234, -1.94167, -2.10001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;
    0, -0.68005, -1.26458, -1.78063, -2.24503, -2.66861, -3.05867, -3.42035, -3.75748, -4.07296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;
    0, -0.94451, -1.78077, -2.53163, -3.21395, -3.83989, -4.41837, -4.95607, -5.45808, -5.92842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;
    0, -1.18035, -2.24547, -3.21433, -4.10237, -4.92176, -5.68202, -6.39062, -7.05352, -7.67551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;
    0, -1.39456, -2.66958, -3.84099, -4.92259, -5.92591, -6.86046, -7.73403, -8.55303, -9.32276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;
    0, -1.59144, -3.06044, -4.42062, -5.68423, -6.86198, -7.96304, -8.99518, -9.96498, -10.878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;
    0, -1.77389, -3.42326, -4.95995, -6.39488, -7.73791, -8.9977, -10.1818, -11.2969, -12.3485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;
    0, -1.944, -3.76191, -5.46418, -7.06061, -8.56023, -9.97119, -11.3007, -12.5553, -13.7406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;
    0, -2.10333, -4.07935, -5.93739, -7.68631, -9.33439, -10.8893, -12.3578, -13.7463, -15.0602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]
# [component: inputs PGIB]
